<?xml version="1.0"?>
<!--
  File:     Saturn_127.xml
  Author:   Aero-Matic v 0.81


  not to scale. Thrust Is for testing only

  Inputs:
    name:           Saturn
    type:           turbine
    thrust:         20200.0 lb
    augmented?      yes
    injected?       no
-->

<turbine_engine name="Saturn">
  <milthrust> 29200.0 </milthrust>
  <maxthrust> 38300.0 </maxthrust>
  <bypassratio>     1.0 </bypassratio>
  <tsfc>            0.01 </tsfc>
  <atsfc>           0.002 </atsfc>
  <bleed>           0.01</bleed>
  <idlen1>         20.0 </idlen1>
  <idlen2>         30.0 </idlen2>
  <maxn1>         100.0 </maxn1>
  <maxn2>         100.0 </maxn2>
  <augmented>         1 </augmented>
  <augmethod>         1 </augmethod>
  <injected>          0 </injected>

  <function name="IdleThrust">
   <table>
    <independentVar lookup="row">velocities/mach</independentVar>
    <independentVar lookup="column">atmosphere/density-altitude</independentVar>
    <tableData>
         -10000     0     10000   20000   30000   40000   50000
     0.0  0.0430  0.0488  0.0428  0.0594  0.0599  0.0183  0.0167
     0.2  0.0500  0.0501  0.0335  0.0444  0.0497  0.0149  0.0142
     0.4  0.0040  0.0047  0.0020  0.0172  0.0395  0.0491  0.0203
     0.6  0.0     0.0     0.0     0.0     0.0176  0.0218  0.0273
     0.8  0.0     0.0     0.0     0.0     0.0274  0.0168  0.0200
     1.0  0.0     0.0     0.0     0.0     0.0     0.0152  0.0100
    </tableData>
   </table>
  </function>

  <function name="MilThrust">
   <table>
    <independentVar lookup="row">velocities/mach</independentVar>
    <independentVar lookup="column">atmosphere/density-altitude</independentVar>
    <tableData>
          -10000       0   10000   20000   30000   40000   50000   60000   70000
     0.0   1.2600  1.0000  0.7400  0.5340  0.3720  0.2410  0.1490  0.0900  0.0200
     0.2   1.1710  0.9340  0.6970  0.5060  0.3550  0.2310  0.1430  0.0870  0.0185
     0.4   1.1500  0.9210  0.6920  0.5060  0.3570  0.2330  0.1450  0.0890  0.0190
     0.6   1.1810  0.9510  0.7210  0.5320  0.3780  0.2480  0.1540  0.0920  0.0210
     0.8   1.2580  1.0200  0.7820  0.5820  0.4170  0.2750  0.1700  0.1000  0.0230
     1.0   1.3690  1.1200  0.8710  0.6510  0.4750  0.3150  0.1950  0.1200  0.0250
     1.2   1.4850  1.2300  0.9750  0.7440  0.5450  0.3640  0.2250  0.1400  0.0270
     1.4   1.5941  1.3400  1.0860  0.8450  0.6280  0.4240  0.2630  0.1600  0.0300
     1.5   1.6500  1.4500  1.1500  0.9500  0.7000  0.4800  0.3000  0.1800  0.0330
     1.6   1.7000  1.5000  1.2000  1.0000  0.7500  0.5200  0.3300  0.1950  0.0360
     1.7   1.7600  1.5500  1.2500  1.0500  0.8000  0.5500  0.3500  0.2050  0.0380
    </tableData>
   </table>
  </function>

  <function name="AugThrust">
   <table>
    <independentVar lookup="row">velocities/mach</independentVar>
    <independentVar lookup="column">atmosphere/density-altitude</independentVar>
    <tableData>
           -10000       0   10000   20000   30000   40000   50000   60000   70000
     0.0    1.1816  1.0000  0.8184  0.6627  0.5280  0.3756  0.2327  0.1200  0.0300
     0.2    1.1308  0.9599  0.7890  0.6406  0.5116  0.3645  0.2258  0.1150  0.0280
     0.4    1.1150  0.9474  0.7798  0.6340  0.5070  0.3615  0.2240  0.1140  0.0290
     0.6    1.1284  0.9589  0.7894  0.6420  0.5134  0.3661  0.2268  0.1160  0.0295
     0.8    1.1707  0.9942  0.8177  0.6647  0.5309  0.3784  0.2345  0.1220  0.0305
     1.0    1.2411  1.0529  0.8648  0.7017  0.5596  0.3983  0.2467  0.1250  0.0310
     1.2    1.3287  1.1254  0.9221  0.7462  0.5936  0.4219  0.2614  0.1300  0.0320
     1.4    1.4365  1.2149  0.9933  0.8021  0.6360  0.4509  0.2794  0.1360  0.0340
     1.6    1.5711  1.3260  1.0809  0.8700  0.6874  0.4860  0.3011  0.1450  0.0360
     1.8    1.7301  1.4579  1.1857  0.9512  0.7495  0.5289  0.3277  0.1550  0.0390
     2.0    1.8314  1.5700  1.3086  1.0474  0.8216  0.5786  0.3585  0.1670  0.0420
     2.2    1.9700  1.6900  1.4100  1.2400  0.9100  0.6359  0.3940  0.1800  0.0450
     2.4    2.0300  1.7800  1.5000  1.3100  0.9700  0.7000  0.4300  0.1900  0.0500
     2.6    2.1000  1.8500  1.5800  1.3500  1.0000  0.7500  0.4500  0.2000  0.0520
    </tableData>
   </table>
  </function>

</turbine_engine>
